<?xml version="1.0"?>
<!-- Generated by Aero-Matic v 1.1

     Inputs:
                horsepower: 1200.0
                     pitch: variable
            max engine rpm: 2700
        prop diameter (ft): 11.5

     Outputs:
              max prop rpm: 1631.57
                gear ratio:    1.65
                       Cp0: 0.068625
                       Ct0: 0.159897
       static thrust (lbs): 4917.55
-->

<!-- Hamilton Standard 6477-A0
Data from NACA Report 640
http://naca.central.cranfield.ac.uk/reports/1938/naca-report-640.pdf -->

<propeller name="prop">
  <ixx>  100 </ixx>
  <diameter unit="IN"> 138.0 </diameter>
  <numblades> 3 </numblades>
  <gearratio>  1.78 </gearratio>
  <p_factor>  10.90 </p_factor>
  <minpitch> 18 </minpitch>
  <maxpitch> 90 </maxpitch>
  <minrpm>   1152 </minrpm>
  <maxrpm>   1517 </maxrpm>

 <!-- thrust coefficient as a function of advance ratio and blade angle -->
  <table name="C_THRUST" type="internal">
      <tableData>
                  0.0000    15.0000    25.0000    35.0000    45.0000    90.0000
       0          0.0000     0.1410     0.1600     0.1740     0.1800     0.0000
       0.2000    -0.1553     0.1160     0.1550     0.1700     0.1820     0.0000
       0.4000    -0.3608     0.0840     0.1520     0.1640     0.1860     0.0000
       0.6000    -0.5049     0.0450     0.1475     0.1600     0.1880     0.0000
       0.8000    -0.5049     0.0040     0.1000     0.1550     0.1780     0.0000
       1.0000    -0.5049    -0.0520     0.0600     0.1455     0.1675     0.0000
       1.2000    -0.5049    -0.1070     0.0175     0.1175     0.1600     0.0000
       1.4000    -0.5049    -0.1300    -0.0350     0.0810     0.1580     0.0000
       1.6000    -0.5049    -0.1300    -0.0889     0.0450     0.1525     0.0000
       1.8000    -0.5049    -0.1300    -0.1300     0.0050     0.1280     0.0000
       2.0000    -0.5049    -0.1300    -0.1300    -0.0400     0.1000     0.0000
       2.2000    -0.5049    -0.1300    -0.1300    -0.0900     0.0700     0.0000
       2.4000    -0.5049    -0.1300    -0.1300    -0.1300     0.0400     0.0000
       2.6000    -0.5049    -0.1300    -0.1300    -0.1300     0.0070     0.0000
       2.8000    -0.5049    -0.1300    -0.1300    -0.1300    -0.0360     0.0000
       3.0000    -0.5049    -0.1300    -0.1300    -0.1300    -0.0780     0.0000
       3.2000    -0.5049    -0.1300    -0.1300    -0.1300    -0.1199     0.0000
       3.4000    -0.5049    -0.1300    -0.1300    -0.1300    -0.1300     0.0000
       3.6000    -0.5049    -0.1300    -0.1300    -0.1300    -0.1300     0.0000
       3.8000    -0.5049    -0.1300    -0.1300    -0.1300    -0.1300     0.0000
       4.0000    -0.5049    -0.1300    -0.1300    -0.1300    -0.1300     0.0000
       6.0000    -0.5049    -0.1300    -0.1300    -0.1300    -0.1300     0.0000
      </tableData>
  </table>

 <!-- power coefficient as a function of advance ratio and blade angle -->
  <table name="C_POWER" type="internal">
     <tableData>
                  0.0000    15.0000    25.0000    35.0000    45.0000    90.0000
       0          0.0445     0.0600     0.1490     0.2630     0.3900     2.2123
       0.2000     0.0712     0.0575     0.1380     0.2510     0.3900     2.2123
       0.4000     0.1554     0.0500     0.1270     0.2380     0.3900     2.2123
       0.6000     0.2354     0.0340     0.1180     0.2225     0.3820     2.2123
       0.8000     0.3153     0.0040     0.1000     0.2100     0.3650     2.2123
       1.0000     0.3918    -0.0170     0.0700     0.1990     0.3470     2.2123
       1.2000     0.3132    -0.0670     0.0260     0.1750     0.3325     2.2123
       1.4000     0.5411    -0.1170    -0.0229     0.1350     0.3260     2.2123
       1.6000     0.6184    -0.1670    -0.0686     0.0850     0.3180     2.2123
       1.8000     0.6930    -0.2170    -0.1146     0.0250     0.2810     2.2123
       2.0000     0.7676    -0.2700    -0.1599    -0.0343     0.2400     2.2123
       2.2000     0.8449    -0.3100    -0.2059    -0.1029     0.1920     2.2123
       2.4000     0.9196    -0.3500    -0.2519    -0.1716     0.1380     2.2123
       2.6000     0.9942    -0.4000    -0.2971    -0.2175     0.0550     2.2123
       2.8000     1.0715    -0.4500    -0.3431    -0.2608    -0.0226     2.2123
       3.0000     1.1461    -0.5000    -0.3891    -0.3088    -0.1029     2.2123
       3.2000     1.2207    -0.5500    -0.4344    -0.3548    -0.1832     2.2123
       3.4000     1.2980    -0.5696    -0.4804    -0.4001    -0.2628     2.2123
       3.6000     1.3727    -0.5696    -0.5264    -0.4461    -0.3431     2.2123
       3.8000     1.4473    -0.5696    -0.5696    -0.4920    -0.4234     2.2123
       4.0000     1.5246    -0.5696    -0.5696    -0.5696    -0.5030     2.2123
       6.0000     2.2123    -0.5696    -0.5696    -0.5696    -0.5696     2.2123
     </tableData>
  </table>

<!-- thrust effects of helical tip Mach -->
<table name="CT_MACH" type="internal">
  <tableData>
    0.85   1.0
    1.05   0.8
  </tableData>
</table>

<!-- power-required effects of helical tip Mach -->
<table name="CP_MACH" type="internal">
  <tableData>
    0.85   1.0
    1.05   1.8
    2.00   1.4
  </tableData>
</table>

</propeller>
